@DSL DefaultGenericBehaviour;
@Behaviour RichardsMechanicsDSMMicroMacroBridge;
@Author OpenGeoSys Community;
@Date 2026 / 03 / 24;
@Description {
Reduced dsm_micromacro-aligned RichardsMechanics bridge for the verified shared
pressure-history boundary. This bridge replaces the earlier logistic pressure
surrogate by a local microstate update using the hierarchical porosity split
(phi_M = (phi0-n_l)/(1-n_l), phi_m = n_l*(1-phi_M)), a reduced micro-liquid
EOS, a van-der-Waals micro potential in J/kg (dimensional fix: /rho_lR applied,
matching native PotentialExchange.h commit 0d579e8aeb), and an isotropic
swelling-stress update.  Active solid fraction uses evolving nS=(1-phi0)/(1-n_l)
instead of the initial constant 1-phi0.
}

@Gradient StrainStensor eps_to;
eps_to.setGlossaryName("Strain");

@Gradient real p_LR;
p_LR.setEntryName("LiquidPressure");

@Flux StressStensor sigma;
sigma.setGlossaryName("Stress");

@Flux real S_L;
S_L.setEntryName("Saturation");

@TangentOperatorBlocks{∂sigma∕∂Δeps_to, ∂sigma∕∂Δp_LR, ∂S_L∕∂Δeps_to,
                       ∂S_L∕∂Δp_LR};

@MaterialProperty stress E;
E.setGlossaryName("YoungModulus");
@MaterialProperty real nu;
nu.setGlossaryName("PoissonRatio");

@MaterialProperty real swelling_slope;
swelling_slope.setEntryName("SwellingSlope");
@MaterialProperty real mass_exchange_coefficient;
mass_exchange_coefficient.setEntryName("MassExchangeCoefficient");
@MaterialProperty real fluid_viscosity;
fluid_viscosity.setEntryName("FluidViscosity");
@MaterialProperty real rho_LR_ref;
rho_LR_ref.setEntryName("ReferenceLiquidDensityMacro");
@MaterialProperty real rho_l0;
rho_l0.setEntryName("ReferenceLiquidDensityMicro");
@MaterialProperty real rho_SR;
rho_SR.setEntryName("ReferenceDensitySolid");
@MaterialProperty real density_a;
density_a.setEntryName("MicroLiquidDensityA");
@MaterialProperty real density_b;
density_b.setEntryName("MicroLiquidDensityB");
@MaterialProperty real hamaker_constant;
hamaker_constant.setEntryName("HamakerConstant");
@MaterialProperty real specific_surface;
specific_surface.setEntryName("SpecificSurface");
@MaterialProperty real phi0;
phi0.setEntryName("InitialPorosity");
@MaterialProperty real area_factor_tuller;
area_factor_tuller.setEntryName("AreaFactorTuller");
@MaterialProperty real pore_area_shape_factor_tuller;
pore_area_shape_factor_tuller.setEntryName("PoreAreaShapeFactorTuller");
@MaterialProperty real characteristic_pore_size;
characteristic_pore_size.setEntryName("CharacteristicPoreSize");
@MaterialProperty real surface_tension;
surface_tension.setEntryName("SurfaceTension");

@StateVariable real n_l;
n_l.setEntryName("n_l");
@StateVariable real rho_lR;
rho_lR.setEntryName("rho_lR");
@StateVariable real epsilon_sw;
epsilon_sw.setEntryName("epsilon_sw");

@AuxiliaryStateVariable real phi_m;
phi_m.setEntryName("phi_m");
@AuxiliaryStateVariable real phi_M;
phi_M.setEntryName("phi_M");
@AuxiliaryStateVariable real mu_lR_value;
mu_lR_value.setEntryName("mu_lR");
@AuxiliaryStateVariable real rho_l_hat_value;
rho_l_hat_value.setEntryName("rho_l_hat");

@ProvidesTangentOperator;
@Integrator {
  constexpr const auto pi = 3.14159265358979323846;
  constexpr const auto pressure_tolerance = 1e-12;
  constexpr const auto minimum_n_l = 1e-14;
  constexpr const auto minimum_density_gap = 1e-12;
  // Finite-difference tangent probes around the benchmark equilibrium hit
  // round-off before 1e-12, which can trigger a spurious line-search failure
  // in an already converged microstate solve.
  constexpr const auto newton_tolerance = 1e-11;
  constexpr const auto max_iterations = 64;

  tfel::raise_if(phi0 <= 0.0 || phi0 >= 1.0,
                 "Invalid parameter: InitialPorosity must lie in (0,1).");
  tfel::raise_if(rho_LR_ref <= 0.0 || rho_l0 <= 0.0 || rho_SR <= 0.0,
                 "Invalid density parameter: all reference densities must be positive.");
  tfel::raise_if(specific_surface <= 0.0,
                 "Invalid parameter: SpecificSurface must be positive.");
  tfel::raise_if(characteristic_pore_size <= 0.0,
                 "Invalid parameter: CharacteristicPoreSize must be positive.");
  tfel::raise_if(surface_tension <= 0.0,
                 "Invalid parameter: SurfaceTension must be positive.");

  const auto lambda = computeLambda(E, nu);
  const auto mu = computeMu(E, nu);
  const auto bulk_modulus = E / (3.0 * (1.0 - 2.0 * nu));
  const auto p = p_LR + Δp_LR;
  const auto delta_epsilon_v = trace(Δeps_to);
  const auto zero_dt = std::abs(dt) < 1e-15;
  // Hierarchical porosity split: phi = phi_M + n_l*(1-phi_M)
  //   => phi_M = (phi - n_l)/(1 - n_l)
  //   => phi_m = n_l*(1 - phi_M) = n_l*(1 - phi0)/(1 - n_l)   [small-strain: phi ≈ phi0]
  // Using phi ≈ phi0 (small-strain / Biot alpha=1 approximation).
  const auto phi_M_from_nl = [&](double nl) {
    const auto nl_safe = std::max(minimum_n_l, nl);
    return std::clamp((phi0 - nl_safe) / (1.0 - nl_safe), 0.0, phi0);
  };
  const auto phi_m_from_nl = [&](double nl) {
    return nl * (1.0 - phi_M_from_nl(nl));
  };
  // [2026-05-26 PHYSICS FIX] active_nS now denotes the aggregate SOLID
  // fraction (V_solid/V_aggregate = 1 - n_l), NOT the aggregate VOLUME
  // fraction in REV (1 - phi_M = (1-phi0)/(1-n_l)). Rationale: the
  // gravimetric water content omega_l = m_water / m_solid requires the
  // mass of solid as the carrier. Per aggregate volume, m_solid =
  // (1-n_l)*V_aggregate*rho_SR; per REV, m_solid = (1-phi)*V_REV*rho_SR;
  // both give the same omega_l. The OLD definition (1-phi_M) produced
  // omega_l_code = n_l*(1-n_l)*rho_lR/((1-phi0)*rho_SR), which is
  // state-dependently off from the standard gravimetric content by
  // factor (1-n_l)^2/(1-phi0) (+80% dry side, -50% saturated side).
  // The same fix is applied in the native binary
  // (ProcessLib/RichardsMechanics/RichardsMechanicsFEM-impl.h).
  const auto active_nS_from_nl = [&](double nl) {
    const auto nl_safe = std::clamp(nl, minimum_n_l, 1.0 - minimum_n_l);
    return 1.0 - nl_safe;
  };

  const auto n_l_prev = n_l;
  const auto rho_lR_prev = rho_lR;
  const auto phi_m_prev = phi_m_from_nl(n_l_prev);
  // REV-scale micro liquid mass density: phi_m * rho_lR  [kg/m³_REV]
  // Matches native ScalarReferenceMassStorage: rho_l = phi_m * rho_lR (not n_l * rho_lR).
  const auto previous_mass = phi_m_prev * rho_lR_prev;
  // Effective exchange coefficient: alpha * rho_LR / mu  — matches native alpha_M_effective.
  const auto alpha_eff = mass_exchange_coefficient * rho_LR_ref /
                          std::max(fluid_viscosity, 1e-20);

  const auto saturation_from_pressure = [&](const auto p_arg) {
    if (p_arg < -pressure_tolerance)
    {
      const auto capillary_prefactor =
          4.0 * pore_area_shape_factor_tuller * surface_tension * surface_tension /
          (area_factor_tuller * characteristic_pore_size * characteristic_pore_size);
      const auto capillary_term = capillary_prefactor / (p_arg * p_arg);
      return 1.0 - std::exp(-capillary_term);
    }
    return 1.0;
  };

  const auto mu_macro_from_pressure = [&](const auto p_arg,
                                          const auto rho_macro_arg) {
    const auto rho_macro_safe =
        std::max(rho_macro_arg, rho_LR_ref + minimum_density_gap);
    return p_arg > -pressure_tolerance ? 0.0 : p_arg / rho_macro_safe;
  };

  // omega = n_l * rho_lR / (active_nS * rho_SR)  — gravimetric water content
  // Uses evolving active_nS = (1-phi0)/(1-n_l) from the hierarchical split.
  const auto omega_from_state = [&](const auto n_l_arg, const auto rho_lR_arg) {
    const auto nS = active_nS_from_nl(n_l_arg);
    return n_l_arg * rho_lR_arg / (nS * rho_SR);
  };

  const auto rho_micro_eos = [&](const auto n_l_arg, const auto rho_lR_arg) {
    const auto omega = std::max(omega_from_state(n_l_arg, rho_lR_arg), minimum_n_l);
    return rho_l0 * std::exp(-density_a * std::pow(omega, density_b)) + rho_LR_ref;
  };

  // vdW micro potential [J/kg], negative_attractive convention — matches native
  // PotentialExchange.h (commit 0d579e8aeb, micro_potential_convention = negative_attractive):
  //
  //   mu_lR = -A * Sa^3 * nS^3 * rho_SR^3 / (6*pi * n_l^3 * rho_lR)   [J/kg, negative]
  //
  // SIGN: negative_attractive means the vdW binding reduces micro chemical potential
  // below free water (mu_lR < 0).  Exchange:
  //   rho_l_hat = alpha * (mu_LR - mu_lR)
  //   mu_LR < 0 at suction; mu_lR < 0 (vdW binding).
  //   When |mu_lR| > |mu_LR| (vdW > suction): mu_LR - mu_lR > 0 → micro fills.
  //   When |mu_lR| < |mu_LR| (suction > vdW): mu_LR - mu_lR < 0 → micro drains.
  //   Equilibrium: mu_LR = mu_lR  (both negative, magnitudes equal).
  //
  // MAGNITUDE: direct nS-form avoids rho_lR power-counting ambiguity via omega.
  //   omega = n_l*rho_lR/(nS*rho_SR); (Sa/omega)^3 = Sa^3*(nS*rho_SR)^3/(n_l*rho_lR)^3
  //   Correct: A*rho_lR^2/(6pi) * (Sa/omega)^3  — not A/(6pi*rho_lR) * (Sa/omega)^3.
  //   Using nS-form directly to eliminate ambiguity:
  const auto mu_micro_from_state = [&](const auto n_l_arg, const auto rho_lR_arg) {
    const auto rho_lR_safe = std::max(rho_lR_arg, rho_LR_ref + minimum_density_gap);
    const auto nS = active_nS_from_nl(n_l_arg);
    const auto n_l_safe = std::max(n_l_arg, minimum_n_l);
    // negative_attractive: sign = -1
    return -(hamaker_constant * specific_surface * specific_surface * specific_surface /
             (6.0 * pi)) *
            (nS * nS * nS * rho_SR * rho_SR * rho_SR) /
            (n_l_safe * n_l_safe * n_l_safe * rho_lR_safe);
  };

  const auto solve_microstate = [&](const auto p_arg,
                                    const auto delta_epsilon_v_arg,
                                    const auto n_l_prev_arg,
                                    const auto rho_lR_prev_arg,
                                    double& n_l_out,
                                    double& rho_lR_out,
                                    double& mu_lR_out,
                                    double& rho_l_hat_out) {
    const auto rho_macro_step =
        std::max(rho_lR_prev_arg, rho_LR_ref + minimum_density_gap);
    auto n_l_trial = std::clamp(n_l_prev_arg, minimum_n_l, phi0);
    auto rho_lR_trial = std::max(rho_lR_prev_arg, rho_LR_ref + minimum_density_gap);
    auto converged = false;

    const auto evaluate = [&](const auto n_l_arg,
                              const auto rho_lR_arg,
                              double& residual_1,
      double& residual_2,
      double& mu_lR_arg,
      double& rho_l_hat_arg) {
      const auto mu_LR_arg = mu_macro_from_pressure(p_arg, rho_macro_step);
      mu_lR_arg = mu_micro_from_state(n_l_arg, rho_lR_arg);
      // Exchange [kg/m³_REV/s]: alpha_eff = alpha * rho_LR / mu — matches native.
      rho_l_hat_arg = alpha_eff * (mu_LR_arg - mu_lR_arg);
      // REV-scale mass balance: phi_m * rho_lR (not n_l * rho_lR) — matches native.
      const auto phi_m_local = phi_m_from_nl(n_l_arg);
      residual_1 = phi_m_local * rho_lR_arg - previous_mass - dt * rho_l_hat_arg -
                   phi_m_local * rho_lR_arg * delta_epsilon_v_arg;
      residual_2 = rho_lR_arg - rho_micro_eos(n_l_arg, rho_lR_arg);
    };

    const auto solve_rho_for_n_l = [&](const auto n_l_arg,
                                       const auto rho_initial_guess,
                                       double& rho_lR_out_arg) {
      auto rho_lR_trial_local =
          std::max(rho_initial_guess, rho_LR_ref + minimum_density_gap);

      for (unsigned int iteration = 0; iteration < 4 * max_iterations;
           ++iteration)
      {
        const auto rho_candidate = rho_micro_eos(n_l_arg, rho_lR_trial_local);
        const auto rho_change = std::abs(rho_candidate - rho_lR_trial_local);
        rho_lR_trial_local = std::max(rho_candidate, rho_LR_ref + minimum_density_gap);

        if (rho_change <
            newton_tolerance * std::max(1.0, std::abs(rho_lR_trial_local)))
        {
          rho_lR_out_arg = rho_lR_trial_local;
          return true;
        }
      }

      rho_lR_out_arg = rho_lR_trial_local;
      return false;
    };

    const auto evaluate_reduced = [&](const auto n_l_arg,
                                      const auto rho_initial_guess,
                                      double& residual_1,
                                      double& rho_lR_arg,
                                      double& mu_lR_arg,
                                      double& rho_l_hat_arg) {
      const auto rho_converged =
          solve_rho_for_n_l(n_l_arg, rho_initial_guess, rho_lR_arg);
      const auto mu_LR_arg = mu_macro_from_pressure(p_arg, rho_macro_step);
      mu_lR_arg = mu_micro_from_state(n_l_arg, rho_lR_arg);
      rho_l_hat_arg = alpha_eff * (mu_LR_arg - mu_lR_arg);
      const auto phi_m_red = phi_m_from_nl(n_l_arg);
      residual_1 =
          phi_m_red * rho_lR_arg - previous_mass - dt * rho_l_hat_arg -
          phi_m_red * rho_lR_arg * delta_epsilon_v_arg;
      return rho_converged;
    };

    const auto solve_microstate_bracketed =
        [&](double& n_l_bracketed_out,
            double& rho_lR_bracketed_out,
            double& mu_lR_bracketed_out,
            double& rho_l_hat_bracketed_out) {
          constexpr const auto bracket_scan_points = 256u;
          auto n_l_lo = minimum_n_l;
          auto n_l_hi = std::max(phi0, std::max(n_l_prev_arg, minimum_n_l * 10.0));

          double residual_lo = 0.0;
          double residual_hi = 0.0;
          double rho_lo = 0.0;
          double rho_hi = 0.0;
          double mu_lo = 0.0;
          double mu_hi = 0.0;
          double rho_hat_lo = 0.0;
          double rho_hat_hi = 0.0;

          auto bracket_ok =
              evaluate_reduced(n_l_lo, rho_lR_prev_arg, residual_lo, rho_lo,
                               mu_lo, rho_hat_lo) &&
              evaluate_reduced(n_l_hi, rho_lR_prev_arg, residual_hi, rho_hi,
                               mu_hi, rho_hat_hi);

          if (!bracket_ok)
          {
            return false;
          }

          if (residual_lo * residual_hi > 0.0)
          {
            const auto log_n_l_min = std::log10(minimum_n_l);
            const auto log_n_l_max = std::log10(n_l_hi);
            auto previous_n_l = n_l_lo;
            auto previous_residual = residual_lo;
            auto previous_rho = rho_lo;
            auto previous_mu = mu_lo;
            auto previous_rho_hat = rho_hat_lo;
            auto found_bracket = false;

            for (unsigned int i = 1; i <= bracket_scan_points; ++i)
            {
              const auto log_n_l =
                  log_n_l_min +
                  (log_n_l_max - log_n_l_min) *
                      (static_cast<double>(i) / bracket_scan_points);
              const auto n_l_candidate = std::pow(10.0, log_n_l);

              double residual_candidate = 0.0;
              double rho_candidate = 0.0;
              double mu_candidate = 0.0;
              double rho_hat_candidate = 0.0;
              if (!evaluate_reduced(n_l_candidate, rho_lR_prev_arg,
                                    residual_candidate, rho_candidate,
                                    mu_candidate, rho_hat_candidate))
              {
                return false;
              }

              if (previous_residual * residual_candidate <= 0.0)
              {
                n_l_lo = previous_n_l;
                residual_lo = previous_residual;
                rho_lo = previous_rho;
                mu_lo = previous_mu;
                rho_hat_lo = previous_rho_hat;

                n_l_hi = n_l_candidate;
                residual_hi = residual_candidate;
                rho_hi = rho_candidate;
                mu_hi = mu_candidate;
                rho_hat_hi = rho_hat_candidate;
                found_bracket = true;
                break;
              }

              previous_n_l = n_l_candidate;
              previous_residual = residual_candidate;
              previous_rho = rho_candidate;
              previous_mu = mu_candidate;
              previous_rho_hat = rho_hat_candidate;
            }

            if (!found_bracket)
            {
              return false;
            }
          }

          for (unsigned int iteration = 0; iteration < 4 * max_iterations;
               ++iteration)
          {
            const auto n_l_mid = 0.5 * (n_l_lo + n_l_hi);
            double residual_mid = 0.0;
            double rho_mid = 0.0;
            double mu_mid = 0.0;
            double rho_hat_mid = 0.0;

            if (!evaluate_reduced(n_l_mid, rho_lR_prev_arg, residual_mid,
                                  rho_mid, mu_mid, rho_hat_mid))
            {
              return false;
            }

            if (std::abs(residual_mid) < newton_tolerance ||
                std::abs(n_l_hi - n_l_lo) <
                    newton_tolerance * std::max(1.0, std::abs(n_l_mid)))
            {
              n_l_bracketed_out = n_l_mid;
              rho_lR_bracketed_out = rho_mid;
              mu_lR_bracketed_out = mu_mid;
              rho_l_hat_bracketed_out = rho_hat_mid;
              return true;
            }

            if (residual_lo * residual_mid <= 0.0)
            {
              n_l_hi = n_l_mid;
              residual_hi = residual_mid;
            }
            else
            {
              n_l_lo = n_l_mid;
              residual_lo = residual_mid;
            }
          }

          const auto n_l_mid = 0.5 * (n_l_lo + n_l_hi);
          double residual_mid = 0.0;
          double rho_mid = 0.0;
          double mu_mid = 0.0;
          double rho_hat_mid = 0.0;
          if (!evaluate_reduced(n_l_mid, rho_lR_prev_arg, residual_mid,
                                rho_mid, mu_mid, rho_hat_mid))
          {
            return false;
          }

          n_l_bracketed_out = n_l_mid;
          rho_lR_bracketed_out = rho_mid;
          mu_lR_bracketed_out = mu_mid;
          rho_l_hat_bracketed_out = rho_hat_mid;
          return true;
        };

    for (unsigned int iteration = 0; iteration < max_iterations; ++iteration)
    {
      double residual_1 = 0.0;
      double residual_2 = 0.0;
      double mu_lR_trial = 0.0;
      double rho_l_hat_trial = 0.0;
      evaluate(n_l_trial, rho_lR_trial, residual_1, residual_2, mu_lR_trial,
               rho_l_hat_trial);

      const auto residual_norm = std::abs(residual_1) + std::abs(residual_2);
      if (residual_norm < newton_tolerance)
      {
        n_l_out = n_l_trial;
        rho_lR_out = rho_lR_trial;
        mu_lR_out = mu_lR_trial;
        rho_l_hat_out = rho_l_hat_trial;
        converged = true;
        break;
      }

      const auto h_n_l = std::max(1e-8 * std::abs(n_l_trial), 1e-10);
      const auto h_rho = std::max(1e-8 * std::abs(rho_lR_trial), 1e-8);

      double residual_1_n = 0.0;
      double residual_2_n = 0.0;
      double residual_1_rho = 0.0;
      double residual_2_rho = 0.0;
      double dummy_1 = 0.0;
      double dummy_2 = 0.0;
      evaluate(n_l_trial + h_n_l, rho_lR_trial, residual_1_n, residual_2_n,
               dummy_1, dummy_2);
      evaluate(n_l_trial, rho_lR_trial + h_rho, residual_1_rho, residual_2_rho,
               dummy_1, dummy_2);

      const auto j11 = (residual_1_n - residual_1) / h_n_l;
      const auto j21 = (residual_2_n - residual_2) / h_n_l;
      const auto j12 = (residual_1_rho - residual_1) / h_rho;
      const auto j22 = (residual_2_rho - residual_2) / h_rho;
      const auto determinant = j11 * j22 - j12 * j21;
      tfel::raise_if(std::abs(determinant) < 1e-24,
                     "DSMMicroMacro bridge microstate Newton system became singular.");

      const auto delta_n_l = (-residual_1 * j22 + j12 * residual_2) / determinant;
      const auto delta_rho = (j21 * residual_1 - j11 * residual_2) / determinant;

      auto damping = 1.0;
      auto accepted = false;
      while (damping > 1e-6)
      {
        // Clamp to [minimum_n_l, phi0]: n_l cannot exceed total porosity.
        // Matches native ceiling = phi (≈ phi0 in small-strain).
        const auto n_l_candidate =
            std::clamp(n_l_trial + damping * delta_n_l, minimum_n_l, phi0);
        const auto rho_candidate =
            std::max(rho_lR_trial + damping * delta_rho,
                     rho_LR_ref + minimum_density_gap);

        double candidate_residual_1 = 0.0;
        double candidate_residual_2 = 0.0;
        double dummy_mu = 0.0;
        double dummy_rho_hat = 0.0;
        evaluate(n_l_candidate, rho_candidate, candidate_residual_1,
                 candidate_residual_2, dummy_mu, dummy_rho_hat);
        const auto candidate_norm =
            std::abs(candidate_residual_1) + std::abs(candidate_residual_2);

        if (candidate_norm < residual_norm)
        {
          n_l_trial = n_l_candidate;
          rho_lR_trial = rho_candidate;
          accepted = true;
          break;
        }
        damping *= 0.5;
      }

      if (!accepted)
      {
        if (solve_microstate_bracketed(n_l_out, rho_lR_out, mu_lR_out,
                                       rho_l_hat_out))
        {
          converged = true;
          break;
        }
        // Bracketed solver failed: check if physics demands n_l > phi0
        // (saturation-clamped state). Evaluate residual at ceiling n_l = phi0.
        // If residual <= 0, all feasible n_l produce negative residual, meaning
        // micro pore space cannot absorb enough mass — clamp to phi0.
        // This matches native behavior: n_l = clamp(n_l, floor, phi_ceiling).
        {
          double res_ceil = 0.0;
          double rho_ceil = 0.0;
          double mu_ceil = 0.0;
          double rho_hat_ceil = 0.0;
          evaluate_reduced(phi0, rho_lR_prev_arg, res_ceil, rho_ceil, mu_ceil,
                           rho_hat_ceil);
          if (res_ceil <= 0.0)
          {
            n_l_out = phi0;
            rho_lR_out = rho_ceil;
            mu_lR_out = mu_ceil;
            rho_l_hat_out = rho_hat_ceil;
            converged = true;
            break;
          }
        }
        tfel::raise_if(true,
                       "DSMMicroMacro bridge microstate Newton line search failed.");
      }
    }

    if (!converged)
    {
      if (solve_microstate_bracketed(n_l_out, rho_lR_out, mu_lR_out,
                                     rho_l_hat_out))
      {
        return;
      }

      // Final fallback: saturation clamp identical to line-search fallback above.
      {
        double res_ceil = 0.0;
        double rho_ceil = 0.0;
        double mu_ceil = 0.0;
        double rho_hat_ceil = 0.0;
        evaluate_reduced(phi0, rho_lR_prev_arg, res_ceil, rho_ceil, mu_ceil,
                         rho_hat_ceil);
        if (res_ceil <= 0.0)
        {
          n_l_out = phi0;
          rho_lR_out = rho_ceil;
          mu_lR_out = mu_ceil;
          rho_l_hat_out = rho_hat_ceil;
          return;
        }
      }

      tfel::raise_if(true,
                     "DSMMicroMacro bridge microstate Newton solve did not converge.");
    }
  };

  double n_l_trial = n_l_prev;
  double rho_lR_trial = rho_lR_prev;
  double mu_lR_trial = mu_micro_from_state(n_l_prev, rho_lR_prev);
  double rho_l_hat_trial =
      mass_exchange_coefficient *
      (mu_macro_from_pressure(p, rho_lR_prev) - mu_lR_trial);
  if (!zero_dt)
  {
    solve_microstate(p, delta_epsilon_v, n_l_prev, rho_lR_prev, n_l_trial,
                     rho_lR_trial, mu_lR_trial, rho_l_hat_trial);
  }

  // Hierarchical porosity split applied at solved n_l:
  const auto phi_m_trial = phi_m_from_nl(n_l_trial);
  const auto phi_M_trial = phi_M_from_nl(n_l_trial);
  const auto delta_epsilon_sw = swelling_slope * (phi_m_trial - phi_m_prev);

  sigma = sigma + lambda * trace(Δeps_to) * I₂ + 2.0 * mu * Δeps_to -
          bulk_modulus * delta_epsilon_sw * I₂;
  S_L = saturation_from_pressure(p);

  n_l = n_l_trial;
  rho_lR = rho_lR_trial;
  epsilon_sw = epsilon_sw + delta_epsilon_sw;
  phi_m = phi_m_trial;
  phi_M = phi_M_trial;
  mu_lR_value = mu_lR_trial;
  rho_l_hat_value = rho_l_hat_trial;

  if (computeTangentOperator_)
  {
    ∂sigma∕∂Δeps_to = lambda * (I₂ ⊗ I₂) + 2.0 * mu * I₄;
    ∂S_L∕∂Δeps_to = 0.0 * I₂;

    if (zero_dt)
    {
      if (p > -pressure_tolerance)
      {
        ∂sigma∕∂Δp_LR = 0.0 * I₂;
        ∂S_L∕∂Δp_LR = 0.0;
      }
      else
      {
        const auto dp_fd = std::max(1e-6, std::abs(p) * 1e-6);
        const auto dS_dp =
            (saturation_from_pressure(p + dp_fd) - saturation_from_pressure(p - dp_fd)) /
            (2.0 * dp_fd);
        ∂sigma∕∂Δp_LR = 0.0 * I₂;
        ∂S_L∕∂Δp_LR = dS_dp;
      }
    }
    else
    {
      const auto deps_v_fd = std::max(1e-8, std::abs(delta_epsilon_v) * 1e-6 + 1e-8);
      double n_l_eps_plus = 0.0;
      double rho_lR_eps_plus = 0.0;
      double mu_lR_eps_plus = 0.0;
      double rho_l_hat_eps_plus = 0.0;
      double n_l_eps_minus = 0.0;
      double rho_lR_eps_minus = 0.0;
      double mu_lR_eps_minus = 0.0;
      double rho_l_hat_eps_minus = 0.0;

      solve_microstate(p, delta_epsilon_v + deps_v_fd, n_l_prev, rho_lR_prev,
                       n_l_eps_plus, rho_lR_eps_plus, mu_lR_eps_plus,
                       rho_l_hat_eps_plus);
      solve_microstate(p, delta_epsilon_v - deps_v_fd, n_l_prev, rho_lR_prev,
                       n_l_eps_minus, rho_lR_eps_minus, mu_lR_eps_minus,
                       rho_l_hat_eps_minus);

      const auto dn_l_dtrace_eps =
          (n_l_eps_plus - n_l_eps_minus) / (2.0 * deps_v_fd);
      ∂sigma∕∂Δeps_to = ∂sigma∕∂Δeps_to -
                        (bulk_modulus * swelling_slope * dn_l_dtrace_eps) *
                            (I₂ ⊗ I₂);

      if (p > -pressure_tolerance)
      {
        ∂sigma∕∂Δp_LR = 0.0 * I₂;
        ∂S_L∕∂Δp_LR = 0.0;
      }
      else
      {
        const auto dp_fd = std::max(1e-6, std::abs(p) * 1e-6);
        double n_l_plus = 0.0;
        double rho_lR_plus = 0.0;
        double mu_lR_plus = 0.0;
        double rho_l_hat_plus = 0.0;
        double n_l_minus = 0.0;
        double rho_lR_minus = 0.0;
        double mu_lR_minus = 0.0;
        double rho_l_hat_minus = 0.0;

        solve_microstate(p + dp_fd, delta_epsilon_v, n_l_prev, rho_lR_prev,
                         n_l_plus, rho_lR_plus, mu_lR_plus, rho_l_hat_plus);
        solve_microstate(p - dp_fd, delta_epsilon_v, n_l_prev, rho_lR_prev,
                         n_l_minus, rho_lR_minus, mu_lR_minus, rho_l_hat_minus);

        const auto dS_dp =
            (saturation_from_pressure(p + dp_fd) - saturation_from_pressure(p - dp_fd)) /
            (2.0 * dp_fd);
        const auto dn_l_dp = (n_l_plus - n_l_minus) / (2.0 * dp_fd);

        ∂sigma∕∂Δp_LR = -(bulk_modulus * swelling_slope * dn_l_dp) * I₂;
        ∂S_L∕∂Δp_LR = dS_dp;
      }
    }
  }
}

@UpdateAuxiliaryStateVariables
{
  constexpr const auto pressure_tolerance = 1e-12;
  constexpr const auto minimum_n_l = 1e-14;
  constexpr const auto pi = 3.14159265358979323846;

  // Hierarchical porosity split: phi_M = (phi0-n_l)/(1-n_l), phi_m = n_l*(1-phi_M)
  const auto phi_M_updated = std::clamp((phi0 - std::max(minimum_n_l, n_l)) /
                                        (1.0 - std::max(minimum_n_l, n_l)), 0.0, phi0);
  const auto active_nS_updated = 1.0 - phi_M_updated;  // = (1-phi0)/(1-n_l)
  phi_m = n_l * active_nS_updated;
  phi_M = phi_M_updated;
  // vdW potential [J/kg], negative_attractive convention (mu_lR < 0):
  //   mu_lR = -A * Sa^3 * nS^3 * rho_SR^3 / (6*pi * n_l^3 * rho_lR)
  const auto rho_lR_safe = std::max(rho_lR, rho_LR_ref + 1e-12);
  const auto n_l_safe_aux = std::max(n_l, minimum_n_l);
  mu_lR_value = -(hamaker_constant * specific_surface * specific_surface * specific_surface /
                  (6.0 * pi)) *
                (active_nS_updated * active_nS_updated * active_nS_updated *
                 rho_SR * rho_SR * rho_SR) /
                (n_l_safe_aux * n_l_safe_aux * n_l_safe_aux * rho_lR_safe);
  // rho_l_hat_value is already set correctly in @Integrator from the converged
  // solve_microstate result (using end-of-step pressure). Do NOT recompute here:
  // @UpdateAuxiliaryStateVariables receives p_LR as the beginning-of-step value
  // in the OGS-MFront coupling, which would give the wrong exchange rate.
  // Leave rho_l_hat_value unchanged (already set by @Integrator line 584).
}
